V_in := 9
mmHg_min := 40
mmHg_max := 250
max := 5*10^-6*V_in*mmHg_max
minimum := 5*10^-6*V_in*mmHg_min
max = 0.01125
minimum = 0.0018
max*800 = 9
x := 62.5
1 + 50000/x1 == 800 solve, x1 → 50000/799 simplify → 50000/799
fs := 1 + 50000/x
fs = 801
# vælger en modstand på 62,5, hvor den indeholder 51 ohm + 10 ohm + 1,5 ohm
3
